# NOTE: This script can be modified for different pair styles
# See in.elastic for more info.

# Choose potential

pair_style deepmd /home/kuanhung/deepMD_all_repositories/dp_train_new/dp_train/graph01/graph-compress01.pb
pair_coeff * *
# Setup neighbor style
neighbor 1.0 nsq
neigh_modify once no every 1 delay 0 check yes

# Setup minimization style
min_style	     cg
min_modify	     dmax ${dmax} line quadratic

# Setup output
thermo		1
thermo_style custom step temp pe press pxx pyy pzz pxy pxz pyz lx ly lz density vol
thermo_modify norm no
